<neuroml xmlns="http://www.neuroml.org/schema/neuroml2"  xmlns:xs="http://www.w3.org/2001/XMLSchema" xmlns:xsi="http://www.w3.org/2001/XMLSchema-instance" xsi:schemaLocation="http://www.neuroml.org/schema/neuroml2 https://raw.github.com/NeuroML/NeuroML2/development/Schemas/NeuroML2/NeuroML_v2beta4.xsd" id="L4SpinyStellate">
    <include href="../channels/ar__m00.channel.nml"></include>
    <include href="../channels/cad__beta0_02__phi260000.nml"></include>
    <include href="../channels/cad__beta0_05__phi260000.nml"></include>
    <include href="../channels/cal.channel.nml"></include>
    <include href="../channels/cat_a.channel.nml"></include>
    <include href="../channels/k2.channel.nml"></include>
    <include href="../channels/ka.channel.nml"></include>
    <include href="../channels/kahp_slower.channel.nml"></include>
    <include href="../channels/kc_fast.channel.nml"></include>
    <include href="../channels/kdr_fs.channel.nml"></include>
    <include href="../channels/km.channel.nml"></include>
    <include href="../channels/naf2__a0__b0__c0__d0__fastNa_shiftmin2_5.channel.nml"></include>
    <include href="../channels/napf_spinstell__a0__b0__c0__d0__fastNa_shiftmin2_5.channel.nml"></include>
    <include href="../channels/pas.channel.nml"></include>
    <cell id="L4SpinyStellate">
        <notes>Cell: spinstell_0 exported from NEURON ModelView</notes>
        <morphology id="morphology_L4SpinyStellate">
            <segment id="0" name="Seg0_comp_1">
                <proximal x="0.000000e+00" y="0.000000e+00" z="0.000000e+00" diameter="15.0"/>
                <distal x="0.000000e+00" y="1.000000e+01" z="0.000000e+00" diameter="15.0"/>
            </segment>
            <segment id="1" name="Seg1_comp_1">
                <parent segment="0" fractionAlong="1"/>
                <distal x="-4.371139e-07" y="2.000000e+01" z="0.000000e+00" diameter="15.0"/>
            </segment>
            <segment id="106" name="Seg0_comp_54">
                <parent segment="0" fractionAlong="0.0"/>
                <proximal x="4.371139e-07" y="0.000000e+00" z="0.000000e+00" diameter="1.4"/>
                <distal x="-3.774500e-07" y="-2.500000e+01" z="0.000000e+00" diameter="1.4"/>
            </segment>
            <segment id="107" name="Seg1_comp_54">
                <parent segment="106" fractionAlong="1"/>
                <distal x="-1.192014e-06" y="-5.000000e+01" z="0.000000e+00" diameter="1.4"/>
            </segment>
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            <segmentGroup neuroLexId="sao864921383" id="comp_1">
                <property tag="numberInternalDivisions" value="2"/>
                <member segment="0"/>
                <member segment="1"/>
            </segmentGroup>
            <segmentGroup neuroLexId="sao864921383" id="comp_54">
                <property tag="numberInternalDivisions" value="54"/>
                <member segment="106"/>
                <member segment="107"/>
            </segmentGroup>
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            <segmentGroup id="ModelViewParmSubset_1">
                <include segmentGroup="comp_1"/>
                <include segmentGroup="comp_41"/>
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            </segmentGroup>
            <segmentGroup id="ModelViewParmSubset_2">
                <include segmentGroup="comp_1"/>
                <include segmentGroup="comp_41"/>
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            </segmentGroup>
            <segmentGroup id="ModelViewParmSubset_3">
                <include segmentGroup="comp_1"/>
                <include segmentGroup="comp_54"/>
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            </segmentGroup>
            <segmentGroup id="ModelViewParmSubset_5">
                <include segmentGroup="comp_1"/>
                <include segmentGroup="comp_54"/>
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            </segmentGroup>
            <segmentGroup id="ModelViewParmSubset_14">
                <include segmentGroup="comp_1"/>
                <include segmentGroup="comp_41"/>
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            </segmentGroup>
            <segmentGroup id="OneSecGrp_SectionRef_1">
                <include segmentGroup="comp_1"/>
            </segmentGroup>
            <segmentGroup neuroLexId="GO:0043025" id="soma_group">
                <include segmentGroup="comp_1"/>
            </segmentGroup>
            <segmentGroup id="prox_dends_soma">
                <include segmentGroup="comp_1"/>
                <include segmentGroup="comp_41"/>
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            </segmentGroup>
            <segmentGroup neuroLexId="GO:0030424" id="axon_group">
                <include segmentGroup="comp_54"/>
                <include segmentGroup="comp_55"/>
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            </segmentGroup>
            <segmentGroup id="prox_axon">
                <include segmentGroup="comp_54"/>
            </segmentGroup>
            <segmentGroup neuroLexId="GO:0030425" id="dendrite_group">
                <include segmentGroup="comp_41"/>
                <include segmentGroup="comp_28"/>
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            </segmentGroup>
            <segmentGroup id="ModelViewParmSubset_6">
                <include segmentGroup="comp_41"/>
                <include segmentGroup="comp_28"/>
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            </segmentGroup>
            <segmentGroup id="ModelViewParmSubset_7">
                <include segmentGroup="comp_41"/>
                <include segmentGroup="comp_28"/>
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            </segmentGroup>
            <segmentGroup id="ModelViewParmSubset_10">
                <include segmentGroup="comp_41"/>
                <include segmentGroup="comp_28"/>
                <include segmentGroup="comp_15"/>
                <include segmentGroup="comp_2"/>
            </segmentGroup>
            <segmentGroup id="ModelViewParmSubset_11">
                <include segmentGroup="comp_41"/>
                <include segmentGroup="comp_28"/>
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            </segmentGroup>
            <segmentGroup id="ModelViewParmSubset_12">
                <include segmentGroup="comp_41"/>
                <include segmentGroup="comp_28"/>
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            </segmentGroup>
            <segmentGroup id="ModelViewParmSubset_9">
                <include segmentGroup="comp_43"/>
                <include segmentGroup="comp_42"/>
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            </segmentGroup>
            <segmentGroup id="mid_tip_dends">
                <include segmentGroup="comp_46"/>
                <include segmentGroup="comp_45"/>
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            </segmentGroup>
            <segmentGroup id="mid_dist_dends">
                <include segmentGroup="comp_46"/>
                <include segmentGroup="comp_45"/>
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            </segmentGroup>
            <segmentGroup id="distal_axon">
                <include segmentGroup="comp_59"/>
                <include segmentGroup="comp_57"/>
            </segmentGroup>
            <segmentGroup id="ModelViewParmSubset_8">
                <include segmentGroup="comp_51"/>
                <include segmentGroup="comp_38"/>
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            </segmentGroup>
        </morphology>
        <biophysicalProperties id="biophys">
            <membraneProperties>
                <channelDensity id="ar_OneSecGrp_SectionRef_1" ionChannel="ar__m00" condDensity="0.25 mS_per_cm2" erev="-40.0 mV" segmentGroup="OneSecGrp_SectionRef_1" ion="ar"/>
                <channelDensity id="ar_ModelViewParmSubset_6" ionChannel="ar__m00" condDensity="0.5 mS_per_cm2" erev="-40.0 mV" segmentGroup="ModelViewParmSubset_6" ion="ar"/>
                <channelDensity id="cal_ModelViewParmSubset_7" ionChannel="cal" condDensity="1.0 mS_per_cm2" erev="125.0 mV" segmentGroup="ModelViewParmSubset_7" ion="ca"/>
                <channelDensity id="cal_OneSecGrp_SectionRef_1" ionChannel="cal" condDensity="0.5 mS_per_cm2" erev="125.0 mV" segmentGroup="OneSecGrp_SectionRef_1" ion="ca"/>
                <channelDensity id="cal_ModelViewParmSubset_8" ionChannel="cal" condDensity="6.0 mS_per_cm2" erev="125.0 mV" segmentGroup="ModelViewParmSubset_8" ion="ca"/>
                <channelDensity id="cat_a_OneSecGrp_SectionRef_1" ionChannel="cat_a" condDensity="0.1 mS_per_cm2" erev="125.0 mV" segmentGroup="OneSecGrp_SectionRef_1" ion="cat_a"/>
                <channelDensity id="cat_a_ModelViewParmSubset_6" ionChannel="cat_a" condDensity="0.2 mS_per_cm2" erev="125.0 mV" segmentGroup="ModelViewParmSubset_6" ion="cat_a"/>
                <channelDensity id="k2_ModelViewParmSubset_5" ionChannel="k2" condDensity="0.1 mS_per_cm2" erev="-100.0 mV" segmentGroup="ModelViewParmSubset_5" ion="k"/>
                <channelDensity id="k2_ModelViewParmSubset_6" ionChannel="k2" condDensity="0.2 mS_per_cm2" erev="-100.0 mV" segmentGroup="ModelViewParmSubset_6" ion="k"/>
                <channelDensity id="ka_axon_group" ionChannel="ka" condDensity="2.0 mS_per_cm2" erev="-100.0 mV" segmentGroup="axon_group" ion="k"/>
                <channelDensity id="ka_OneSecGrp_SectionRef_1" ionChannel="ka" condDensity="30.0 mS_per_cm2" erev="-100.0 mV" segmentGroup="OneSecGrp_SectionRef_1" ion="k"/>
                <channelDensity id="ka_ModelViewParmSubset_9" ionChannel="ka" condDensity="4.0 mS_per_cm2" erev="-100.0 mV" segmentGroup="ModelViewParmSubset_9" ion="k"/>
                <channelDensity id="ka_ModelViewParmSubset_10" ionChannel="ka" condDensity="60.0 mS_per_cm2" erev="-100.0 mV" segmentGroup="ModelViewParmSubset_10" ion="k"/>
                <channelDensity id="kahp_slower_OneSecGrp_SectionRef_1" ionChannel="kahp_slower" condDensity="0.1 mS_per_cm2" erev="-100.0 mV" segmentGroup="OneSecGrp_SectionRef_1" ion="k"/>
                <channelDensity id="kahp_slower_ModelViewParmSubset_6" ionChannel="kahp_slower" condDensity="0.2 mS_per_cm2" erev="-100.0 mV" segmentGroup="ModelViewParmSubset_6" ion="k"/>
                <channelDensity id="kc_fast_OneSecGrp_SectionRef_1" ionChannel="kc_fast" condDensity="10.0 mS_per_cm2" erev="-100.0 mV" segmentGroup="OneSecGrp_SectionRef_1" ion="k"/>
                <channelDensity id="kc_fast_ModelViewParmSubset_11" ionChannel="kc_fast" condDensity="20.0 mS_per_cm2" erev="-100.0 mV" segmentGroup="ModelViewParmSubset_11" ion="k"/>
                <channelDensity id="kdr_fs_OneSecGrp_SectionRef_1" ionChannel="kdr_fs" condDensity="100.0 mS_per_cm2" erev="-100.0 mV" segmentGroup="OneSecGrp_SectionRef_1" ion="k"/>
                <channelDensity id="kdr_fs_ModelViewParmSubset_12" ionChannel="kdr_fs" condDensity="150.0 mS_per_cm2" erev="-100.0 mV" segmentGroup="ModelViewParmSubset_12" ion="k"/>
                <channelDensity id="kdr_fs_axon_group" ionChannel="kdr_fs" condDensity="400.0 mS_per_cm2" erev="-100.0 mV" segmentGroup="axon_group" ion="k"/>
                <channelDensity id="km_OneSecGrp_SectionRef_1" ionChannel="km" condDensity="3.75 mS_per_cm2" erev="-100.0 mV" segmentGroup="OneSecGrp_SectionRef_1" ion="k"/>
                <channelDensity id="km_ModelViewParmSubset_6" ionChannel="km" condDensity="7.5 mS_per_cm2" erev="-100.0 mV" segmentGroup="ModelViewParmSubset_6" ion="k"/>
                <channelDensity id="naf2_mid_dist_dends" ionChannel="naf2__a0__b0__c0__d0__fastNa_shiftmin2_5" condDensity="10.0 mS_per_cm2" erev="50.0 mV" segmentGroup="mid_dist_dends" ion="na"/>
                <channelDensity id="naf2_ModelViewParmSubset_14" ionChannel="naf2__a0__b0__c0__d0__fastNa_shiftmin2_5" condDensity="150.0 mS_per_cm2" erev="50.0 mV" segmentGroup="ModelViewParmSubset_14" ion="na"/>
                <channelDensity id="naf2_axon_group" ionChannel="naf2__a0__b0__c0__d0__fastNa_shiftmin2_5" condDensity="400.0 mS_per_cm2" erev="50.0 mV" segmentGroup="axon_group" ion="na"/>
                <channelDensity id="napf_spinstell_mid_dist_dends" ionChannel="napf_spinstell__a0__b0__c0__d0__fastNa_shiftmin2_5" condDensity="0.01 mS_per_cm2" erev="50.0 mV" segmentGroup="mid_dist_dends" ion="na"/>
                <channelDensity id="napf_spinstell_ModelViewParmSubset_14" ionChannel="napf_spinstell__a0__b0__c0__d0__fastNa_shiftmin2_5" condDensity="0.15 mS_per_cm2" erev="50.0 mV" segmentGroup="ModelViewParmSubset_14" ion="na"/>
                <channelDensity id="pas_axon_group" ionChannel="pas" condDensity="1.0 mS_per_cm2" erev="-65.0 mV" segmentGroup="axon_group" ion="non_specific"/>
                <channelDensity id="pas_OneSecGrp_SectionRef_1" ionChannel="pas" condDensity="0.02 mS_per_cm2" erev="-65.0 mV" segmentGroup="OneSecGrp_SectionRef_1" ion="non_specific"/>
                <channelDensity id="pas_ModelViewParmSubset_6" ionChannel="pas" condDensity="0.04 mS_per_cm2" erev="-65.0 mV" segmentGroup="ModelViewParmSubset_6" ion="non_specific"/>
                <spikeThresh value="0.0 mV"/>
                <specificCapacitance value="1.8 uF_per_cm2" segmentGroup="ModelViewParmSubset_6"/>
                <specificCapacitance value="0.9 uF_per_cm2" segmentGroup="ModelViewParmSubset_5"/>
                <initMembPotential value="-65.0 mV"/>
            </membraneProperties>
            <intracellularProperties>
                <species segmentGroup="ModelViewParmSubset_6" id="ca" concentrationModel="cad__beta0_05__phi260000" ion="ca" initialConcentration="1.0E-8 mol_per_cm3" initialExtConcentration="2.0E-6 mol_per_cm3"/>
                <species segmentGroup="OneSecGrp_SectionRef_1" id="ca" concentrationModel="cad__beta0_02__phi260000" ion="ca" initialConcentration="1.0E-8 mol_per_cm3" initialExtConcentration="2.0E-6 mol_per_cm3"/>
                <resistivity value="0.1 kohm_cm" segmentGroup="axon_group"/>
                <resistivity value="0.25 kohm_cm" segmentGroup="ModelViewParmSubset_1"/>
            </intracellularProperties>
        </biophysicalProperties>
    </cell>
</neuroml>
