<neuroml xmlns="http://www.neuroml.org/schema/neuroml2"  xmlns:xs="http://www.w3.org/2001/XMLSchema" xmlns:xsi="http://www.w3.org/2001/XMLSchema-instance" xsi:schemaLocation="http://www.neuroml.org/schema/neuroml2 https://raw.github.com/NeuroML/NeuroML2/development/Schemas/NeuroML2/NeuroML_v2beta4.xsd" id="L5TuftedPyrIB">
    <include href="../channels/ar__m00_25.channel.nml"></include>
    <include href="../channels/cad__beta0_01__phi4333_33.nml"></include>
    <include href="../channels/cad__beta0_02__phi86666_7.nml"></include>
    <include href="../channels/cad__beta0_075__phi86666_7.nml"></include>
    <include href="../channels/cal.channel.nml"></include>
    <include href="../channels/cat.channel.nml"></include>
    <include href="../channels/k2.channel.nml"></include>
    <include href="../channels/ka_ib.channel.nml"></include>
    <include href="../channels/kahp_deeppyr.channel.nml"></include>
    <include href="../channels/kc.channel.nml"></include>
    <include href="../channels/kdr.channel.nml"></include>
    <include href="../channels/km.channel.nml"></include>
    <include href="../channels/naf__a0__b0__c0__d0__fastNa_shiftmin3_5.channel.nml"></include>
    <include href="../channels/nap.channel.nml"></include>
    <include href="../channels/pas.channel.nml"></include>
    <cell id="L5TuftedPyrIB">
        <notes>Cell: tuftIB_0 exported from NEURON ModelView</notes>
        <morphology id="morphology_L5TuftedPyrIB">
            <segment id="0" name="Seg0_comp_1">
                <proximal x="0.000000e+00" y="0.000000e+00" z="0.000000e+00" diameter="18.0"/>
                <distal x="0.000000e+00" y="1.250000e+01" z="0.000000e+00" diameter="18.0"/>
            </segment>
            <segment id="1" name="Seg1_comp_1">
                <parent segment="0" fractionAlong="1"/>
                <distal x="-0.000000e+00" y="2.500000e+01" z="0.000000e+00" diameter="18.0"/>
            </segment>
            <segment id="110" name="Seg0_comp_56">
                <parent segment="0" fractionAlong="0.0"/>
                <proximal x="0.000000e+00" y="0.000000e+00" z="0.000000e+00" diameter="1.8"/>
                <distal x="1.250000e+01" y="0.000000e+00" z="0.000000e+00" diameter="1.8"/>
            </segment>
            <segment id="111" name="Seg1_comp_56">
                <parent segment="110" fractionAlong="1"/>
                <distal x="2.500000e+01" y="0.000000e+00" z="0.000000e+00" diameter="1.8"/>
            </segment>
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            <segmentGroup neuroLexId="sao864921383" id="comp_1">
                <property tag="numberInternalDivisions" value="2"/>
                <member segment="0"/>
                <member segment="1"/>
            </segmentGroup>
            <segmentGroup neuroLexId="sao864921383" id="comp_56">
                <property tag="numberInternalDivisions" value="24"/>
                <member segment="110"/>
                <member segment="111"/>
            </segmentGroup>
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            <segmentGroup id="ModelViewParmSubset_1">
                <include segmentGroup="comp_1"/>
                <include segmentGroup="comp_35"/>
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            </segmentGroup>
            <segmentGroup id="ModelViewParmSubset_2">
                <include segmentGroup="comp_1"/>
                <include segmentGroup="comp_56"/>
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            </segmentGroup>
            <segmentGroup id="ModelViewParmSubset_4">
                <include segmentGroup="comp_1"/>
                <include segmentGroup="comp_56"/>
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            </segmentGroup>
            <segmentGroup id="ModelViewParmSubset_12">
                <include segmentGroup="comp_1"/>
                <include segmentGroup="comp_38"/>
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            </segmentGroup>
            <segmentGroup id="OneSecGrp_SectionRef_1">
                <include segmentGroup="comp_1"/>
            </segmentGroup>
            <segmentGroup neuroLexId="GO:0043025" id="soma_group">
                <include segmentGroup="comp_1"/>
            </segmentGroup>
            <segmentGroup id="DeepBask_dends">
                <include segmentGroup="comp_1"/>
                <include segmentGroup="comp_35"/>
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            </segmentGroup>
            <segmentGroup neuroLexId="GO:0030424" id="axon_group">
                <include segmentGroup="comp_56"/>
                <include segmentGroup="comp_57"/>
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            </segmentGroup>
            <segmentGroup id="prox_axon">
                <include segmentGroup="comp_56"/>
            </segmentGroup>
            <segmentGroup neuroLexId="GO:0030425" id="dendrite_group">
                <include segmentGroup="comp_35"/>
                <include segmentGroup="comp_6"/>
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            </segmentGroup>
            <segmentGroup id="ModelViewParmSubset_5">
                <include segmentGroup="comp_35"/>
                <include segmentGroup="comp_6"/>
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            </segmentGroup>
            <segmentGroup id="ModelViewParmSubset_9">
                <include segmentGroup="comp_35"/>
                <include segmentGroup="comp_4"/>
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            </segmentGroup>
            <segmentGroup id="ModelViewParmSubset_14">
                <include segmentGroup="comp_35"/>
                <include segmentGroup="comp_6"/>
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            </segmentGroup>
            <segmentGroup id="ModelViewParmSubset_16">
                <include segmentGroup="comp_35"/>
                <include segmentGroup="comp_6"/>
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            </segmentGroup>
            <segmentGroup id="ModelViewParmSubset_20">
                <include segmentGroup="comp_35"/>
                <include segmentGroup="comp_6"/>
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            </segmentGroup>
            <segmentGroup id="OneSecGrp_SectionRef_3">
                <include segmentGroup="comp_35"/>
            </segmentGroup>
            <segmentGroup id="dends_no_tuft">
                <include segmentGroup="comp_35"/>
                <include segmentGroup="comp_6"/>
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            </segmentGroup>
            <segmentGroup id="ModelViewParmSubset_8">
                <include segmentGroup="comp_6"/>
                <include segmentGroup="comp_5"/>
                <include segmentGroup="comp_2"/>
            </segmentGroup>
            <segmentGroup id="ModelViewParmSubset_19">
                <include segmentGroup="comp_6"/>
                <include segmentGroup="comp_5"/>
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            </segmentGroup>
            <segmentGroup id="L4SS_dends">
                <include segmentGroup="comp_36"/>
                <include segmentGroup="comp_12"/>
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            </segmentGroup>
            <segmentGroup id="ModelViewParmSubset_17">
                <include segmentGroup="comp_17"/>
                <include segmentGroup="comp_16"/>
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            </segmentGroup>
            <segmentGroup id="dend_tips_shaft">
                <include segmentGroup="comp_17"/>
                <include segmentGroup="comp_16"/>
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            </segmentGroup>
            <segmentGroup id="distal_axon">
                <include segmentGroup="comp_61"/>
                <include segmentGroup="comp_60"/>
            </segmentGroup>
            <segmentGroup id="apic_shaft">
                <include segmentGroup="comp_39"/>
                <include segmentGroup="comp_40"/>
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            </segmentGroup>
            <segmentGroup id="ModelViewParmSubset_11">
                <include segmentGroup="comp_45"/>
                <include segmentGroup="comp_46"/>
                <include segmentGroup="comp_47"/>
            </segmentGroup>
            <segmentGroup id="ModelViewParmSubset_18">
                <include segmentGroup="comp_45"/>
                <include segmentGroup="comp_46"/>
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            </segmentGroup>
            <segmentGroup id="tuft_plus">
                <include segmentGroup="comp_47"/>
                <include segmentGroup="comp_49"/>
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            </segmentGroup>
            <segmentGroup id="ModelViewParmSubset_7">
                <include segmentGroup="comp_49"/>
                <include segmentGroup="comp_48"/>
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            </segmentGroup>
            <segmentGroup id="ModelViewParmSubset_13">
                <include segmentGroup="comp_49"/>
                <include segmentGroup="comp_48"/>
            </segmentGroup>
            <segmentGroup id="ModelViewParmSubset_10">
                <include segmentGroup="comp_51"/>
                <include segmentGroup="comp_50"/>
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            </segmentGroup>
        </morphology>
        <biophysicalProperties id="biophys">
            <membraneProperties>
                <channelDensity id="ar_OneSecGrp_SectionRef_1" ionChannel="ar__m00_25" condDensity="0.1 mS_per_cm2" erev="-35.0 mV" segmentGroup="OneSecGrp_SectionRef_1" ion="ar"/>
                <channelDensity id="ar_dends_no_tuft" ionChannel="ar__m00_25" condDensity="0.2 mS_per_cm2" erev="-35.0 mV" segmentGroup="dends_no_tuft" ion="ar"/>
                <channelDensity id="ar_ModelViewParmSubset_7" ionChannel="ar__m00_25" condDensity="0.4 mS_per_cm2" erev="-35.0 mV" segmentGroup="ModelViewParmSubset_7" ion="ar"/>
                <channelDensity id="cal_ModelViewParmSubset_10" ionChannel="cal" condDensity="1.2 mS_per_cm2" erev="125.0 mV" segmentGroup="ModelViewParmSubset_10" ion="ca"/>
                <channelDensity id="cal_ModelViewParmSubset_11" ionChannel="cal" condDensity="2.0 mS_per_cm2" erev="125.0 mV" segmentGroup="ModelViewParmSubset_11" ion="ca"/>
                <channelDensity id="cal_ModelViewParmSubset_12" ionChannel="cal" condDensity="4.0 mS_per_cm2" erev="125.0 mV" segmentGroup="ModelViewParmSubset_12" ion="ca"/>
                <channelDensity id="cal_ModelViewParmSubset_13" ionChannel="cal" condDensity="5.4 mS_per_cm2" erev="125.0 mV" segmentGroup="ModelViewParmSubset_13" ion="ca"/>
                <channelDensity id="cal_ModelViewParmSubset_14" ionChannel="cal" condDensity="8.0 mS_per_cm2" erev="125.0 mV" segmentGroup="ModelViewParmSubset_14" ion="ca"/>
                <channelDensity id="cat_OneSecGrp_SectionRef_1" ionChannel="cat" condDensity="0.1 mS_per_cm2" erev="125.0 mV" segmentGroup="OneSecGrp_SectionRef_1" ion="cat"/>
                <channelDensity id="cat_ModelViewParmSubset_5" ionChannel="cat" condDensity="0.2 mS_per_cm2" erev="125.0 mV" segmentGroup="ModelViewParmSubset_5" ion="cat"/>
                <channelDensity id="k2_ModelViewParmSubset_5" ionChannel="k2" condDensity="1.0 mS_per_cm2" erev="-95.0 mV" segmentGroup="ModelViewParmSubset_5" ion="k"/>
                <channelDensity id="k2_ModelViewParmSubset_4" ionChannel="k2" condDensity="0.5 mS_per_cm2" erev="-95.0 mV" segmentGroup="ModelViewParmSubset_4" ion="k"/>
                <channelDensity id="ka_ib_dend_tips_shaft" ionChannel="ka_ib" condDensity="1.2 mS_per_cm2" erev="-95.0 mV" segmentGroup="dend_tips_shaft" ion="k"/>
                <channelDensity id="ka_ib_ModelViewParmSubset_16" ionChannel="ka_ib" condDensity="16.0 mS_per_cm2" erev="-95.0 mV" segmentGroup="ModelViewParmSubset_16" ion="k"/>
                <channelDensity id="ka_ib_OneSecGrp_SectionRef_1" ionChannel="ka_ib" condDensity="20.0 mS_per_cm2" erev="-95.0 mV" segmentGroup="OneSecGrp_SectionRef_1" ion="k"/>
                <channelDensity id="ka_ib_axon_group" ionChannel="ka_ib" condDensity="0.6 mS_per_cm2" erev="-95.0 mV" segmentGroup="axon_group" ion="k"/>
                <channelDensity id="kahp_deeppyr_OneSecGrp_SectionRef_1" ionChannel="kahp_deeppyr" condDensity="0.2 mS_per_cm2" erev="-95.0 mV" segmentGroup="OneSecGrp_SectionRef_1" ion="k"/>
                <channelDensity id="kahp_deeppyr_ModelViewParmSubset_5" ionChannel="kahp_deeppyr" condDensity="0.4 mS_per_cm2" erev="-95.0 mV" segmentGroup="ModelViewParmSubset_5" ion="k"/>
                <channelDensity id="kc_ModelViewParmSubset_17" ionChannel="kc" condDensity="1.0 mS_per_cm2" erev="-95.0 mV" segmentGroup="ModelViewParmSubset_17" ion="k"/>
                <channelDensity id="kc_OneSecGrp_SectionRef_1" ionChannel="kc" condDensity="16.0 mS_per_cm2" erev="-95.0 mV" segmentGroup="OneSecGrp_SectionRef_1" ion="k"/>
                <channelDensity id="kc_ModelViewParmSubset_18" ionChannel="kc" condDensity="2.4 mS_per_cm2" erev="-95.0 mV" segmentGroup="ModelViewParmSubset_18" ion="k"/>
                <channelDensity id="kc_ModelViewParmSubset_16" ionChannel="kc" condDensity="32.0 mS_per_cm2" erev="-95.0 mV" segmentGroup="ModelViewParmSubset_16" ion="k"/>
                <channelDensity id="kdr_ModelViewParmSubset_19" ionChannel="kdr" condDensity="150.0 mS_per_cm2" erev="-95.0 mV" segmentGroup="ModelViewParmSubset_19" ion="k"/>
                <channelDensity id="kdr_OneSecGrp_SectionRef_1" ionChannel="kdr" condDensity="170.0 mS_per_cm2" erev="-95.0 mV" segmentGroup="OneSecGrp_SectionRef_1" ion="k"/>
                <channelDensity id="kdr_OneSecGrp_SectionRef_3" ionChannel="kdr" condDensity="240.0 mS_per_cm2" erev="-95.0 mV" segmentGroup="OneSecGrp_SectionRef_3" ion="k"/>
                <channelDensity id="kdr_axon_group" ionChannel="kdr" condDensity="450.0 mS_per_cm2" erev="-95.0 mV" segmentGroup="axon_group" ion="k"/>
                <channelDensity id="km_ModelViewParmSubset_18" ionChannel="km" condDensity="11.2 mS_per_cm2" erev="-95.0 mV" segmentGroup="ModelViewParmSubset_18" ion="k"/>
                <channelDensity id="km_OneSecGrp_SectionRef_1" ionChannel="km" condDensity="11.9 mS_per_cm2" erev="-95.0 mV" segmentGroup="OneSecGrp_SectionRef_1" ion="k"/>
                <channelDensity id="km_axon_group" ionChannel="km" condDensity="30.0 mS_per_cm2" erev="-95.0 mV" segmentGroup="axon_group" ion="k"/>
                <channelDensity id="km_ModelViewParmSubset_20" ionChannel="km" condDensity="38.08 mS_per_cm2" erev="-95.0 mV" segmentGroup="ModelViewParmSubset_20" ion="k"/>
                <channelDensity id="naf_ModelViewParmSubset_19" ionChannel="naf__a0__b0__c0__d0__fastNa_shiftmin3_5" condDensity="150.0 mS_per_cm2" erev="50.0 mV" segmentGroup="ModelViewParmSubset_19" ion="na"/>
                <channelDensity id="naf_OneSecGrp_SectionRef_1" ionChannel="naf__a0__b0__c0__d0__fastNa_shiftmin3_5" condDensity="200.0 mS_per_cm2" erev="50.0 mV" segmentGroup="OneSecGrp_SectionRef_1" ion="na"/>
                <channelDensity id="naf_OneSecGrp_SectionRef_3" ionChannel="naf__a0__b0__c0__d0__fastNa_shiftmin3_5" condDensity="300.0 mS_per_cm2" erev="50.0 mV" segmentGroup="OneSecGrp_SectionRef_3" ion="na"/>
                <channelDensity id="naf_ModelViewParmSubset_17" ionChannel="naf__a0__b0__c0__d0__fastNa_shiftmin3_5" condDensity="30.0 mS_per_cm2" erev="50.0 mV" segmentGroup="ModelViewParmSubset_17" ion="na"/>
                <channelDensity id="naf_axon_group" ionChannel="naf__a0__b0__c0__d0__fastNa_shiftmin3_5" condDensity="450.0 mS_per_cm2" erev="50.0 mV" segmentGroup="axon_group" ion="na"/>
                <channelDensity id="naf_ModelViewParmSubset_18" ionChannel="naf__a0__b0__c0__d0__fastNa_shiftmin3_5" condDensity="6.0 mS_per_cm2" erev="50.0 mV" segmentGroup="ModelViewParmSubset_18" ion="na"/>
                <channelDensity id="nap_ModelViewParmSubset_19" ionChannel="nap" condDensity="0.12 mS_per_cm2" erev="50.0 mV" segmentGroup="ModelViewParmSubset_19" ion="na"/>
                <channelDensity id="nap_OneSecGrp_SectionRef_1" ionChannel="nap" condDensity="0.16 mS_per_cm2" erev="50.0 mV" segmentGroup="OneSecGrp_SectionRef_1" ion="na"/>
                <channelDensity id="nap_ModelViewParmSubset_17" ionChannel="nap" condDensity="0.024 mS_per_cm2" erev="50.0 mV" segmentGroup="ModelViewParmSubset_17" ion="na"/>
                <channelDensity id="nap_OneSecGrp_SectionRef_3" ionChannel="nap" condDensity="0.24 mS_per_cm2" erev="50.0 mV" segmentGroup="OneSecGrp_SectionRef_3" ion="na"/>
                <channelDensity id="nap_ModelViewParmSubset_18" ionChannel="nap" condDensity="0.0048 mS_per_cm2" erev="50.0 mV" segmentGroup="ModelViewParmSubset_18" ion="na"/>
                <channelDensity id="pas_axon_group" ionChannel="pas" condDensity="1.0 mS_per_cm2" erev="-70.0 mV" segmentGroup="axon_group" ion="non_specific"/>
                <channelDensity id="pas_OneSecGrp_SectionRef_1" ionChannel="pas" condDensity="0.02 mS_per_cm2" erev="-70.0 mV" segmentGroup="OneSecGrp_SectionRef_1" ion="non_specific"/>
                <channelDensity id="pas_ModelViewParmSubset_5" ionChannel="pas" condDensity="0.04 mS_per_cm2" erev="-70.0 mV" segmentGroup="ModelViewParmSubset_5" ion="non_specific"/>
                <spikeThresh value="0.0 mV"/>
                <specificCapacitance value="1.8 uF_per_cm2" segmentGroup="ModelViewParmSubset_5"/>
                <specificCapacitance value="0.9 uF_per_cm2" segmentGroup="ModelViewParmSubset_4"/>
                <initMembPotential value="-70.0 mV"/>
            </membraneProperties>
            <intracellularProperties>
                <species segmentGroup="ModelViewParmSubset_9" id="ca" concentrationModel="cad__beta0_075__phi86666_7" ion="ca" initialConcentration="1.0E-8 mol_per_cm3" initialExtConcentration="2.0E-6 mol_per_cm3"/>
                <species segmentGroup="ModelViewParmSubset_8" id="ca" concentrationModel="cad__beta0_02__phi86666_7" ion="ca" initialConcentration="1.0E-8 mol_per_cm3" initialExtConcentration="2.0E-6 mol_per_cm3"/>
                <species segmentGroup="OneSecGrp_SectionRef_1" id="ca" concentrationModel="cad__beta0_01__phi4333_33" ion="ca" initialConcentration="1.0E-8 mol_per_cm3" initialExtConcentration="2.0E-6 mol_per_cm3"/>
                <resistivity value="0.1 kohm_cm" segmentGroup="axon_group"/>
                <resistivity value="0.25 kohm_cm" segmentGroup="ModelViewParmSubset_1"/>
            </intracellularProperties>
        </biophysicalProperties>
    </cell>
</neuroml>
