<neuroml xmlns="http://www.neuroml.org/schema/neuroml2"  xmlns:xs="http://www.w3.org/2001/XMLSchema" xmlns:xsi="http://www.w3.org/2001/XMLSchema-instance" xsi:schemaLocation="http://www.neuroml.org/schema/neuroml2 https://raw.github.com/NeuroML/NeuroML2/development/Schemas/NeuroML2/NeuroML_v2beta4.xsd" id="TCR">
    <include href="../channels/ar__m00_25.channel.nml"></include>
    <include href="../channels/cad__beta0_02__phi52000.nml"></include>
    <include href="../channels/cad__beta0_05__phi104000.nml"></include>
    <include href="../channels/cal.channel.nml"></include>
    <include href="../channels/cat.channel.nml"></include>
    <include href="../channels/k2.channel.nml"></include>
    <include href="../channels/ka.channel.nml"></include>
    <include href="../channels/kahp_slower.channel.nml"></include>
    <include href="../channels/kc.channel.nml"></include>
    <include href="../channels/kdr.channel.nml"></include>
    <include href="../channels/km.channel.nml"></include>
    <include href="../channels/naf_tcr__shift_hnafmin7__shift_mnaf_initmin3__shift_mnaf_runmin2_5.channel.nml"></include>
    <include href="../channels/napf_tcr__a0__b0__c0__d0__fastNa_shift7.channel.nml"></include>
    <include href="../channels/pas.channel.nml"></include>
    <cell id="TCR">
        <notes>Cell: TCR_0 exported from NEURON ModelView</notes>
        <morphology id="morphology_TCR">
            <segment id="0" name="Seg0_comp_1">
                <proximal x="0.000000e+00" y="0.000000e+00" z="0.000000e+00" diameter="20.0"/>
                <distal x="0.000000e+00" y="2.100000e+01" z="0.000000e+00" diameter="20.0"/>
            </segment>
            <segment id="1" name="Seg1_comp_1">
                <parent segment="0" fractionAlong="1"/>
                <distal x="-9.179392e-07" y="4.200000e+01" z="0.000000e+00" diameter="20.0"/>
            </segment>
            <segment id="262" name="Seg0_comp_132">
                <parent segment="0" fractionAlong="0.0"/>
                <proximal x="9.179392e-07" y="0.000000e+00" z="0.000000e+00" diameter="1.6"/>
                <distal x="-1.748462e-07" y="-2.500000e+01" z="0.000000e+00" diameter="1.6"/>
            </segment>
            <segment id="263" name="Seg1_comp_132">
                <parent segment="262" fractionAlong="1"/>
                <distal x="-1.267632e-06" y="-5.000000e+01" z="0.000000e+00" diameter="1.6"/>
            </segment>
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            <segmentGroup neuroLexId="sao864921383" id="comp_1">
                <property tag="numberInternalDivisions" value="2"/>
                <member segment="0"/>
                <member segment="1"/>
            </segmentGroup>
            <segmentGroup neuroLexId="sao864921383" id="comp_132">
                <property tag="numberInternalDivisions" value="25"/>
                <member segment="262"/>
                <member segment="263"/>
            </segmentGroup>
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            <segmentGroup id="ModelViewParmSubset_1">
                <include segmentGroup="comp_1"/>
                <include segmentGroup="comp_119"/>
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            </segmentGroup>
            <segmentGroup id="ModelViewParmSubset_2">
                <include segmentGroup="comp_1"/>
                <include segmentGroup="comp_132"/>
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            </segmentGroup>
            <segmentGroup id="OneSecGrp_SectionRef_1">
                <include segmentGroup="comp_1"/>
            </segmentGroup>
            <segmentGroup neuroLexId="GO:0043025" id="soma_group">
                <include segmentGroup="comp_1"/>
            </segmentGroup>
            <segmentGroup id="ModelViewParmSubset_8">
                <include segmentGroup="comp_1"/>
                <include segmentGroup="comp_131"/>
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            </segmentGroup>
            <segmentGroup id="soma_prox_dends">
                <include segmentGroup="comp_1"/>
                <include segmentGroup="comp_119"/>
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            </segmentGroup>
            <segmentGroup id="ModelViewParmSubset_3">
                <include segmentGroup="comp_132"/>
                <include segmentGroup="comp_133"/>
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            </segmentGroup>
            <segmentGroup id="ModelViewParmSubset_10">
                <include segmentGroup="comp_132"/>
                <include segmentGroup="comp_133"/>
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            </segmentGroup>
            <segmentGroup neuroLexId="GO:0030424" id="axon_group">
                <include segmentGroup="comp_132"/>
                <include segmentGroup="comp_133"/>
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            </segmentGroup>
            <segmentGroup neuroLexId="GO:0030425" id="dendrite_group">
                <include segmentGroup="comp_119"/>
                <include segmentGroup="comp_106"/>
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            </segmentGroup>
            <segmentGroup id="ModelViewParmSubset_6">
                <include segmentGroup="comp_119"/>
                <include segmentGroup="comp_106"/>
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            </segmentGroup>
            <segmentGroup id="prox_dends">
                <include segmentGroup="comp_119"/>
                <include segmentGroup="comp_106"/>
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            </segmentGroup>
            <segmentGroup id="ModelViewParmSubset_4">
                <include segmentGroup="comp_122"/>
                <include segmentGroup="comp_121"/>
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            </segmentGroup>
            <segmentGroup id="ModelViewParmSubset_9">
                <include segmentGroup="comp_122"/>
                <include segmentGroup="comp_121"/>
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            </segmentGroup>
            <segmentGroup id="distal_dends">
                <include segmentGroup="comp_131"/>
                <include segmentGroup="comp_130"/>
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            </segmentGroup>
            <segmentGroup id="distal_axon">
                <include segmentGroup="comp_137"/>
                <include segmentGroup="comp_135"/>
            </segmentGroup>
        </morphology>
        <biophysicalProperties id="biophys">
            <membraneProperties>
                <channelDensity id="ar_OneSecGrp_SectionRef_1" ionChannel="ar__m00_25" condDensity="0.25 mS_per_cm2" erev="-35.0 mV" segmentGroup="OneSecGrp_SectionRef_1" ion="ar"/>
                <channelDensity id="ar_ModelViewParmSubset_4" ionChannel="ar__m00_25" condDensity="0.3 mS_per_cm2" erev="-35.0 mV" segmentGroup="ModelViewParmSubset_4" ion="ar"/>
                <channelDensity id="ar_prox_dends" ionChannel="ar__m00_25" condDensity="0.5 mS_per_cm2" erev="-35.0 mV" segmentGroup="prox_dends" ion="ar"/>
                <channelDensity id="cal_ModelViewParmSubset_4" ionChannel="cal" condDensity="0.25 mS_per_cm2" erev="125.0 mV" segmentGroup="ModelViewParmSubset_4" ion="ca"/>
                <channelDensity id="cal_soma_prox_dends" ionChannel="cal" condDensity="0.5 mS_per_cm2" erev="125.0 mV" segmentGroup="soma_prox_dends" ion="ca"/>
                <channelDensity id="cat_ModelViewParmSubset_9" ionChannel="cat" condDensity="3.0 mS_per_cm2" erev="125.0 mV" segmentGroup="ModelViewParmSubset_9" ion="cat"/>
                <channelDensity id="cat_ModelViewParmSubset_8" ionChannel="cat" condDensity="0.5 mS_per_cm2" erev="125.0 mV" segmentGroup="ModelViewParmSubset_8" ion="cat"/>
                <channelDensity id="k2_ModelViewParmSubset_1" ionChannel="k2" condDensity="2.0 mS_per_cm2" erev="-95.0 mV" segmentGroup="ModelViewParmSubset_1" ion="k"/>
                <channelDensity id="k2_ModelViewParmSubset_3" ionChannel="k2" condDensity="0.5 mS_per_cm2" erev="-95.0 mV" segmentGroup="ModelViewParmSubset_3" ion="k"/>
                <channelDensity id="ka_ModelViewParmSubset_10" ionChannel="ka" condDensity="0.2 mS_per_cm2" erev="-95.0 mV" segmentGroup="ModelViewParmSubset_10" ion="k"/>
                <channelDensity id="ka_soma_prox_dends" ionChannel="ka" condDensity="6.0 mS_per_cm2" erev="-95.0 mV" segmentGroup="soma_prox_dends" ion="k"/>
                <channelDensity id="kahp_slower_ModelViewParmSubset_1" ionChannel="kahp_slower" condDensity="0.05 mS_per_cm2" erev="-95.0 mV" segmentGroup="ModelViewParmSubset_1" ion="k"/>
                <channelDensity id="kc_soma_prox_dends" ionChannel="kc" condDensity="12.0 mS_per_cm2" erev="-95.0 mV" segmentGroup="soma_prox_dends" ion="k"/>
                <channelDensity id="kc_ModelViewParmSubset_4" ionChannel="kc" condDensity="20.0 mS_per_cm2" erev="-95.0 mV" segmentGroup="ModelViewParmSubset_4" ion="k"/>
                <channelDensity id="kdr_ModelViewParmSubset_3" ionChannel="kdr" condDensity="180.0 mS_per_cm2" erev="-95.0 mV" segmentGroup="ModelViewParmSubset_3" ion="k"/>
                <channelDensity id="kdr_prox_dends" ionChannel="kdr" condDensity="22.5 mS_per_cm2" erev="-95.0 mV" segmentGroup="prox_dends" ion="k"/>
                <channelDensity id="kdr_OneSecGrp_SectionRef_1" ionChannel="kdr" condDensity="33.75 mS_per_cm2" erev="-95.0 mV" segmentGroup="OneSecGrp_SectionRef_1" ion="k"/>
                <channelDensity id="km_ModelViewParmSubset_1" ionChannel="km" condDensity="0.5 mS_per_cm2" erev="-95.0 mV" segmentGroup="ModelViewParmSubset_1" ion="k"/>
                <channelDensity id="naf_tcr_soma_prox_dends" ionChannel="naf_tcr__shift_hnafmin7__shift_mnaf_initmin3__shift_mnaf_runmin2_5" condDensity="100.0 mS_per_cm2" erev="50.0 mV" segmentGroup="soma_prox_dends" ion="na"/>
                <channelDensity id="naf_tcr_ModelViewParmSubset_3" ionChannel="naf_tcr__shift_hnafmin7__shift_mnaf_initmin3__shift_mnaf_runmin2_5" condDensity="400.0 mS_per_cm2" erev="50.0 mV" segmentGroup="ModelViewParmSubset_3" ion="na"/>
                <channelDensity id="naf_tcr_ModelViewParmSubset_4" ionChannel="naf_tcr__shift_hnafmin7__shift_mnaf_initmin3__shift_mnaf_runmin2_5" condDensity="5.0 mS_per_cm2" erev="50.0 mV" segmentGroup="ModelViewParmSubset_4" ion="na"/>
                <channelDensity id="napf_tcr_ModelViewParmSubset_4" ionChannel="napf_tcr__a0__b0__c0__d0__fastNa_shift7" condDensity="0.01 mS_per_cm2" erev="50.0 mV" segmentGroup="ModelViewParmSubset_4" ion="na"/>
                <channelDensity id="napf_tcr_soma_prox_dends" ionChannel="napf_tcr__a0__b0__c0__d0__fastNa_shift7" condDensity="0.2 mS_per_cm2" erev="50.0 mV" segmentGroup="soma_prox_dends" ion="na"/>
                <channelDensity id="pas_ModelViewParmSubset_3" ionChannel="pas" condDensity="1.0 mS_per_cm2" erev="-70.0 mV" segmentGroup="ModelViewParmSubset_3" ion="non_specific"/>
                <channelDensity id="pas_ModelViewParmSubset_1" ionChannel="pas" condDensity="0.0378788 mS_per_cm2" erev="-70.0 mV" segmentGroup="ModelViewParmSubset_1" ion="non_specific"/>
                <spikeThresh value="0.0 mV"/>
                <specificCapacitance value="0.9 uF_per_cm2"/>
                <initMembPotential value="-70.0 mV"/>
            </membraneProperties>
            <intracellularProperties>
                <species segmentGroup="ModelViewParmSubset_6" id="ca" concentrationModel="cad__beta0_05__phi104000" ion="ca" initialConcentration="1.0E-8 mol_per_cm3" initialExtConcentration="2.0E-6 mol_per_cm3"/>
                <species segmentGroup="OneSecGrp_SectionRef_1" id="ca" concentrationModel="cad__beta0_02__phi52000" ion="ca" initialConcentration="1.0E-8 mol_per_cm3" initialExtConcentration="2.0E-6 mol_per_cm3"/>
                <resistivity value="0.1 kohm_cm" segmentGroup="ModelViewParmSubset_3"/>
                <resistivity value="0.175 kohm_cm" segmentGroup="ModelViewParmSubset_1"/>
            </intracellularProperties>
        </biophysicalProperties>
    </cell>
</neuroml>
