<neuroml xmlns="http://www.neuroml.org/schema/neuroml2"  xmlns:xs="http://www.w3.org/2001/XMLSchema" xmlns:xsi="http://www.w3.org/2001/XMLSchema-instance" xsi:schemaLocation="http://www.neuroml.org/schema/neuroml2 https://raw.github.com/NeuroML/NeuroML2/development/Schemas/NeuroML2/NeuroML_v2beta4.xsd" id="nRT">
    <include href="../channels/ar__m00.channel.nml"></include>
    <include href="../channels/cad__beta0_02__phi10400.nml"></include>
    <include href="../channels/cad__beta0_05__phi260000.nml"></include>
    <include href="../channels/cal.channel.nml"></include>
    <include href="../channels/cat_a.channel.nml"></include>
    <include href="../channels/k2.channel.nml"></include>
    <include href="../channels/ka.channel.nml"></include>
    <include href="../channels/kahp_slower.channel.nml"></include>
    <include href="../channels/kc.channel.nml"></include>
    <include href="../channels/kdr_fs.channel.nml"></include>
    <include href="../channels/km.channel.nml"></include>
    <include href="../channels/naf2__a0__b0__c0__d0__fastNa_shift0.channel.nml"></include>
    <include href="../channels/napf__a0__b0__c0__d0__fastNa_shift0.channel.nml"></include>
    <include href="../channels/pas.channel.nml"></include>
    <cell id="nRT">
        <notes>Cell: nRT_0 exported from NEURON ModelView</notes>
        <morphology id="morphology_nRT">
            <segment id="0" name="Seg0_comp_1">
                <proximal x="0.000000e+00" y="0.000000e+00" z="0.000000e+00" diameter="18.68"/>
                <distal x="0.000000e+00" y="1.500000e+01" z="0.000000e+00" diameter="18.68"/>
            </segment>
            <segment id="1" name="Seg1_comp_1">
                <parent segment="0" fractionAlong="1"/>
                <distal x="-0.000000e+00" y="3.000000e+01" z="0.000000e+00" diameter="18.68"/>
            </segment>
            <segment id="106" name="Seg0_comp_54">
                <parent segment="0" fractionAlong="0.0"/>
                <proximal x="0.000000e+00" y="0.000000e+00" z="0.000000e+00" diameter="1.6"/>
                <distal x="-0.000000e+00" y="-2.500000e+01" z="0.000000e+00" diameter="1.6"/>
            </segment>
            <segment id="107" name="Seg1_comp_54">
                <parent segment="106" fractionAlong="1"/>
                <distal x="-0.000000e+00" y="-5.000000e+01" z="0.000000e+00" diameter="1.6"/>
            </segment>
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            <segmentGroup neuroLexId="sao864921383" id="comp_1">
                <property tag="numberInternalDivisions" value="2"/>
                <member segment="0"/>
                <member segment="1"/>
            </segmentGroup>
            <segmentGroup neuroLexId="sao864921383" id="comp_54">
                <property tag="numberInternalDivisions" value="25"/>
                <member segment="106"/>
                <member segment="107"/>
            </segmentGroup>
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            <segmentGroup id="ModelViewParmSubset_4">
                <include segmentGroup="comp_1"/>
                <include segmentGroup="comp_41"/>
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            </segmentGroup>
            <segmentGroup id="OneSecGrp_SectionRef_1">
                <include segmentGroup="comp_1"/>
            </segmentGroup>
            <segmentGroup neuroLexId="GO:0043025" id="soma_group">
                <include segmentGroup="comp_1"/>
            </segmentGroup>
            <segmentGroup id="soma_dends">
                <include segmentGroup="comp_1"/>
                <include segmentGroup="comp_41"/>
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            </segmentGroup>
            <segmentGroup id="ModelViewParmSubset_6">
                <include segmentGroup="comp_54"/>
                <include segmentGroup="comp_55"/>
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            </segmentGroup>
            <segmentGroup neuroLexId="GO:0030424" id="axon_group">
                <include segmentGroup="comp_54"/>
                <include segmentGroup="comp_55"/>
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            </segmentGroup>
            <segmentGroup neuroLexId="GO:0030425" id="dendrite_group">
                <include segmentGroup="comp_41"/>
                <include segmentGroup="comp_28"/>
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            </segmentGroup>
            <segmentGroup id="ModelViewParmSubset_3">
                <include segmentGroup="comp_41"/>
                <include segmentGroup="comp_28"/>
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            </segmentGroup>
            <segmentGroup id="proximal_dends">
                <include segmentGroup="comp_41"/>
                <include segmentGroup="comp_28"/>
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            </segmentGroup>
            <segmentGroup id="ModelViewParmSubset_5">
                <include segmentGroup="comp_46"/>
                <include segmentGroup="comp_45"/>
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            </segmentGroup>
            <segmentGroup id="distal_axon">
                <include segmentGroup="comp_59"/>
                <include segmentGroup="comp_57"/>
            </segmentGroup>
        </morphology>
        <biophysicalProperties id="biophys">
            <membraneProperties>
                <channelDensity id="ar_soma_dends" ionChannel="ar__m00" condDensity="0.025 mS_per_cm2" erev="-40.0 mV" segmentGroup="soma_dends" ion="ar"/>
                <channelDensity id="cal_soma_dends" ionChannel="cal" condDensity="0.5 mS_per_cm2" erev="125.0 mV" segmentGroup="soma_dends" ion="ca"/>
                <channelDensity id="cat_a_ModelViewParmSubset_5" ionChannel="cat_a" condDensity="2.0 mS_per_cm2" erev="125.0 mV" segmentGroup="ModelViewParmSubset_5" ion="cat_a"/>
                <channelDensity id="cat_a_ModelViewParmSubset_4" ionChannel="cat_a" condDensity="0.05 mS_per_cm2" erev="125.0 mV" segmentGroup="ModelViewParmSubset_4" ion="cat_a"/>
                <channelDensity id="k2_all" ionChannel="k2" condDensity="0.5 mS_per_cm2" erev="-100.0 mV" ion="k"/>
                <channelDensity id="ka_ModelViewParmSubset_6" ionChannel="ka" condDensity="1.0 mS_per_cm2" erev="-100.0 mV" segmentGroup="ModelViewParmSubset_6" ion="k"/>
                <channelDensity id="ka_ModelViewParmSubset_4" ionChannel="ka" condDensity="5.0 mS_per_cm2" erev="-100.0 mV" segmentGroup="ModelViewParmSubset_4" ion="k"/>
                <channelDensity id="kahp_slower_soma_dends" ionChannel="kahp_slower" condDensity="0.1 mS_per_cm2" erev="-100.0 mV" segmentGroup="soma_dends" ion="k"/>
                <channelDensity id="kc_soma_dends" ionChannel="kc" condDensity="10.0 mS_per_cm2" erev="-100.0 mV" segmentGroup="soma_dends" ion="k"/>
                <channelDensity id="kdr_fs_ModelViewParmSubset_5" ionChannel="kdr_fs" condDensity="10.0 mS_per_cm2" erev="-100.0 mV" segmentGroup="ModelViewParmSubset_5" ion="k"/>
                <channelDensity id="kdr_fs_axon_group" ionChannel="kdr_fs" condDensity="400.0 mS_per_cm2" erev="-100.0 mV" segmentGroup="axon_group" ion="k"/>
                <channelDensity id="kdr_fs_ModelViewParmSubset_4" ionChannel="kdr_fs" condDensity="60.0 mS_per_cm2" erev="-100.0 mV" segmentGroup="ModelViewParmSubset_4" ion="k"/>
                <channelDensity id="km_soma_dends" ionChannel="km" condDensity="0.5 mS_per_cm2" erev="-100.0 mV" segmentGroup="soma_dends" ion="k"/>
                <channelDensity id="naf2_ModelViewParmSubset_5" ionChannel="naf2__a0__b0__c0__d0__fastNa_shift0" condDensity="10.0 mS_per_cm2" erev="50.0 mV" segmentGroup="ModelViewParmSubset_5" ion="na"/>
                <channelDensity id="naf2_axon_group" ionChannel="naf2__a0__b0__c0__d0__fastNa_shift0" condDensity="400.0 mS_per_cm2" erev="50.0 mV" segmentGroup="axon_group" ion="na"/>
                <channelDensity id="naf2_ModelViewParmSubset_4" ionChannel="naf2__a0__b0__c0__d0__fastNa_shift0" condDensity="60.0 mS_per_cm2" erev="50.0 mV" segmentGroup="ModelViewParmSubset_4" ion="na"/>
                <channelDensity id="napf_ModelViewParmSubset_5" ionChannel="napf__a0__b0__c0__d0__fastNa_shift0" condDensity="0.1 mS_per_cm2" erev="50.0 mV" segmentGroup="ModelViewParmSubset_5" ion="na"/>
                <channelDensity id="napf_ModelViewParmSubset_4" ionChannel="napf__a0__b0__c0__d0__fastNa_shift0" condDensity="0.6 mS_per_cm2" erev="50.0 mV" segmentGroup="ModelViewParmSubset_4" ion="na"/>
                <channelDensity id="pas_axon_group" ionChannel="pas" condDensity="1.0 mS_per_cm2" erev="-75.0 mV" segmentGroup="axon_group" ion="non_specific"/>
                <channelDensity id="pas_soma_dends" ionChannel="pas" condDensity="0.05 mS_per_cm2" erev="-75.0 mV" segmentGroup="soma_dends" ion="non_specific"/>
                <spikeThresh value="0.0 mV"/>
                <specificCapacitance value="1.0 uF_per_cm2"/>
                <initMembPotential value="-88.0 mV"/>
            </membraneProperties>
            <intracellularProperties>
                <species segmentGroup="ModelViewParmSubset_3" id="ca" concentrationModel="cad__beta0_05__phi260000" ion="ca" initialConcentration="1.0E-8 mol_per_cm3" initialExtConcentration="2.0E-6 mol_per_cm3"/>
                <species segmentGroup="OneSecGrp_SectionRef_1" id="ca" concentrationModel="cad__beta0_02__phi10400" ion="ca" initialConcentration="1.0E-8 mol_per_cm3" initialExtConcentration="2.0E-6 mol_per_cm3"/>
                <resistivity value="0.1 kohm_cm" segmentGroup="axon_group"/>
                <resistivity value="0.25 kohm_cm" segmentGroup="soma_dends"/>
            </intracellularProperties>
        </biophysicalProperties>
    </cell>
</neuroml>
