<neuroml xmlns="http://www.neuroml.org/schema/neuroml2"  xmlns:xs="http://www.w3.org/2001/XMLSchema" xmlns:xsi="http://www.w3.org/2001/XMLSchema-instance" xsi:schemaLocation="http://www.neuroml.org/schema/neuroml2 https://raw.github.com/NeuroML/NeuroML2/development/Schemas/NeuroML2/NeuroML_v2beta5.xsd" id="TestL23">
    <notes>

This NeuroML 2 file was generated by OpenCortex v0.0.8 using:
    libNeuroML v0.2.28
    pyNeuroML v0.2.8

    </notes>
    <property tag="Python random seed" value="134344"/>
    <include href="TestL23/SupLTSInter.cell.nml"></include>
    <include href="TestL23/ar__m00_25.channel.nml"></include>
    <include href="TestL23/cad__beta0_02__phi260000.nml"></include>
    <include href="TestL23/cad__beta0_05__phi520000.nml"></include>
    <include href="TestL23/cal.channel.nml"></include>
    <include href="TestL23/cat_a.channel.nml"></include>
    <include href="TestL23/k2.channel.nml"></include>
    <include href="TestL23/ka.channel.nml"></include>
    <include href="TestL23/kahp_slower.channel.nml"></include>
    <include href="TestL23/kc_fast.channel.nml"></include>
    <include href="TestL23/kdr_fs.channel.nml"></include>
    <include href="TestL23/km.channel.nml"></include>
    <include href="TestL23/naf2__a0__b0__c0__d0__fastNa_shiftmin2_5.channel.nml"></include>
    <include href="TestL23/nap.channel.nml"></include>
    <include href="TestL23/pas.channel.nml"></include>
    <include href="TestL23/SupAxAx.cell.nml"></include>
    <include href="TestL23/ar__m00_25.channel.nml"></include>
    <include href="TestL23/cad__beta0_02__phi260000.nml"></include>
    <include href="TestL23/cad__beta0_05__phi520000.nml"></include>
    <include href="TestL23/cal.channel.nml"></include>
    <include href="TestL23/cat.channel.nml"></include>
    <include href="TestL23/k2.channel.nml"></include>
    <include href="TestL23/ka.channel.nml"></include>
    <include href="TestL23/kahp_slower.channel.nml"></include>
    <include href="TestL23/kc_fast.channel.nml"></include>
    <include href="TestL23/kdr_fs.channel.nml"></include>
    <include href="TestL23/km.channel.nml"></include>
    <include href="TestL23/naf2__a0__b0__c0__d0__fastNa_shiftmin2_5.channel.nml"></include>
    <include href="TestL23/nap.channel.nml"></include>
    <include href="TestL23/pas.channel.nml"></include>
    <include href="TestL23/SupBasket.cell.nml"></include>
    <include href="TestL23/ar__m00_25.channel.nml"></include>
    <include href="TestL23/cad__beta0_02__phi260000.nml"></include>
    <include href="TestL23/cad__beta0_05__phi520000.nml"></include>
    <include href="TestL23/cal.channel.nml"></include>
    <include href="TestL23/cat.channel.nml"></include>
    <include href="TestL23/k2.channel.nml"></include>
    <include href="TestL23/ka.channel.nml"></include>
    <include href="TestL23/kahp_slower.channel.nml"></include>
    <include href="TestL23/kc_fast.channel.nml"></include>
    <include href="TestL23/kdr_fs.channel.nml"></include>
    <include href="TestL23/km.channel.nml"></include>
    <include href="TestL23/naf2__a0__b0__c0__d0__fastNa_shiftmin2_5.channel.nml"></include>
    <include href="TestL23/nap.channel.nml"></include>
    <include href="TestL23/pas.channel.nml"></include>
    <include href="TestL23/L23PyrRS.cell.nml"></include>
    <include href="TestL23/ar__m00_25.channel.nml"></include>
    <include href="TestL23/cad__beta0_01__phi26000.nml"></include>
    <include href="TestL23/cad__beta0_05__phi52000.nml"></include>
    <include href="TestL23/cal.channel.nml"></include>
    <include href="TestL23/cat.channel.nml"></include>
    <include href="TestL23/k2.channel.nml"></include>
    <include href="TestL23/ka.channel.nml"></include>
    <include href="TestL23/kahp.channel.nml"></include>
    <include href="TestL23/kc.channel.nml"></include>
    <include href="TestL23/kdr.channel.nml"></include>
    <include href="TestL23/km.channel.nml"></include>
    <include href="TestL23/naf__a0__b0__c0__d0__fastNa_shiftmin3_5.channel.nml"></include>
    <include href="TestL23/nap.channel.nml"></include>
    <include href="TestL23/pas.channel.nml"></include>
    <include href="TestL23/Syn_AMPA_SupPyr_SupFS.synapse.nml"></include>
    <include href="TestL23/Syn_AMPA_SupPyr_SupLTS.synapse.nml"></include>
    <include href="TestL23/Syn_AMPA_SupPyr_SupPyr.synapse.nml"></include>
    <include href="TestL23/Syn_GABAA_SupAxAx_SupPyr.synapse.nml"></include>
    <include href="TestL23/Syn_GABAA_SupBask_SupAxAx.synapse.nml"></include>
    <include href="TestL23/Syn_GABAA_SupBask_SupBask.synapse.nml"></include>
    <include href="TestL23/Syn_GABAA_SupBask_SupLTS.synapse.nml"></include>
    <include href="TestL23/Syn_GABAA_SupBask_SupPyr.synapse.nml"></include>
    <include href="TestL23/Syn_GABAA_SupLTS_FS.synapse.nml"></include>
    <include href="TestL23/Syn_GABAA_SupLTS_LTS.synapse.nml"></include>
    <include href="TestL23/Syn_GABAA_SupLTS_SupPyr.synapse.nml"></include>
    <include href="TestL23/Syn_NMDA_RSPyr_SupFS.synapse.nml"></include>
    <include href="TestL23/Syn_NMDA_RSPyr_SupLTS.synapse.nml"></include>
    <include href="TestL23/Syn_NMDA_SupPyr_SupPyr.synapse.nml"></include>
    <include href="TestL23/SynForEctStim.synapse.nml"></include>
    <pulseGenerator id="DepCurr_L23RS_TO_CG3D_L23PyrRS_Pulse0_Cell7" delay="0.000000 ms" duration="20000.000000 ms" amplitude="0.000078 uA"/>
    <pulseGenerator id="DepCurr_L23RS_TO_CG3D_L23PyrRS_Pulse0_Cell2" delay="0.000000 ms" duration="20000.000000 ms" amplitude="0.000085 uA"/>
    <pulseGenerator id="DepCurr_L23RS_TO_CG3D_L23PyrRS_Pulse0_Cell1" delay="0.000000 ms" duration="20000.000000 ms" amplitude="0.000094 uA"/>
    <pulseGenerator id="DepCurr_L23RS_TO_CG3D_L23PyrRS_Pulse0_Cell4" delay="0.000000 ms" duration="20000.000000 ms" amplitude="0.000078 uA"/>
    <pulseGenerator id="DepCurr_L23RS_TO_CG3D_L23PyrRS_Pulse0_Cell6" delay="0.000000 ms" duration="20000.000000 ms" amplitude="0.000093 uA"/>
    <pulseGenerator id="DepCurr_L23RS_TO_CG3D_L23PyrRS_Pulse0_Cell5" delay="0.000000 ms" duration="20000.000000 ms" amplitude="0.000068 uA"/>
    <pulseGenerator id="DepCurr_L23RS_TO_CG3D_L23PyrRS_Pulse0_Cell3" delay="0.000000 ms" duration="20000.000000 ms" amplitude="0.000097 uA"/>
    <pulseGenerator id="DepCurr_L23RS_TO_CG3D_L23PyrRS_Pulse0_Cell0" delay="0.000000 ms" duration="20000.000000 ms" amplitude="0.000077 uA"/>
    <pulseGenerator id="DepCurr_L23RS_TO_CG3D_L23PyrRS_Pulse0_Cell8" delay="0.000000 ms" duration="20000.000000 ms" amplitude="0.000066 uA"/>
    <pulseGenerator id="DepCurr_L23RS_TO_CG3D_L23PyrRS_Pulse0_Cell9" delay="0.000000 ms" duration="20000.000000 ms" amplitude="0.000085 uA"/>
    <poissonFiringSynapse id="BackgroundL23RS_TO_CG3D_L23PyrRS_PoiSyn0" averageRate="100.000000 Hz" synapse="Syn_AMPA_SupPyr_SupPyr" spikeTarget="./Syn_AMPA_SupPyr_SupPyr"/>
    <poissonFiringSynapse id="EctopicStimL23RS_TO_CG3D_L23PyrRS_PoiSyn0" averageRate="0.100000 Hz" synapse="SynForEctStim" spikeTarget="./SynForEctStim"/>
    <network id="TestL23" type="networkWithTemperature" temperature="32degC">
        <population id="CG3D_L23PyrRS" component="L23PyrRS" size="10" type="populationList">
            <instance id="0">
                <location x="-158.841310297000007" y="-430.118999579999979" z="10.9331207863"/>
            </instance>
            <instance id="1">
                <location x="141.792475313000011" y="-291.860215211000025" z="151.145387168000013"/>
            </instance>
            <instance id="2">
                <location x="-97.095312510799999" y="-478.58514186299999" z="201.078817444999999"/>
            </instance>
            <instance id="3">
                <location x="-143.090450519000001" y="-348.643492587000026" z="-9.63519612084"/>
            </instance>
            <instance id="4">
                <location x="61.440847859400002" y="-184.8606336" z="135.961968380000002"/>
            </instance>
            <instance id="5">
                <location x="-16.360709678500001" y="-297.179410757000028" z="68.076998188100006"/>
            </instance>
            <instance id="6">
                <location x="162.030723585999993" y="-241.849860095999986" z="16.7264562748"/>
            </instance>
            <instance id="7">
                <location x="38.544948929" y="-318.042282290999992" z="180.780087866000002"/>
            </instance>
            <instance id="8">
                <location x="153.102393696999997" y="-390.971665221000023" z="-136.505549086999991"/>
            </instance>
            <instance id="9">
                <location x="-79.770593936599994" y="-206.511810927999989" z="-228.659888058000007"/>
            </instance>
        </population>
        <population id="CG3D_SupAxAx" component="SupAxAx" size="1" type="populationList">
            <instance id="0">
                <location x="117.369245014000001" y="-140.674613141999998" z="-26.669326248099999"/>
            </instance>
        </population>
        <population id="CG3D_SupLTS" component="SupLTSInter" size="1" type="populationList">
            <instance id="0">
                <location x="135.939205221000009" y="-205.774491216999991" z="-41.391158938700002"/>
            </instance>
        </population>
        <population id="CG3D_SupBask" component="SupBasket" size="1" type="populationList">
            <instance id="0">
                <location x="-69.673970340300002" y="-474.283611356999984" z="-108.914323581999994"/>
            </instance>
        </population>
        <projection id="Proj0syn0_CG3D_L23PyrRS_CG3D_L23PyrRS" presynapticPopulation="CG3D_L23PyrRS" postsynapticPopulation="CG3D_L23PyrRS" synapse="Syn_AMPA_SupPyr_SupPyr">
            <connectionWD id="0" preCellId="../CG3D_L23PyrRS/6/L23PyrRS" preSegmentId="142" preFractionAlong="0.351983403142" postCellId="../CG3D_L23PyrRS/0/L23PyrRS" postSegmentId="71" postFractionAlong="0.355668256135" weight="1." delay="0.05 ms"/>
            <connectionWD id="1" preCellId="../CG3D_L23PyrRS/6/L23PyrRS" preSegmentId="142" preFractionAlong="0.117526221159" postCellId="../CG3D_L23PyrRS/0/L23PyrRS" postSegmentId="51" postFractionAlong="0.554924601522" weight="1." delay="0.05 ms"/>
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        </projection>
        <projection id="Proj0syn1_CG3D_L23PyrRS_CG3D_L23PyrRS" presynapticPopulation="CG3D_L23PyrRS" postsynapticPopulation="CG3D_L23PyrRS" synapse="Syn_NMDA_SupPyr_SupPyr">
            <connectionWD id="0" preCellId="../CG3D_L23PyrRS/6/L23PyrRS" preSegmentId="142" preFractionAlong="0.351983403142" postCellId="../CG3D_L23PyrRS/0/L23PyrRS" postSegmentId="71" postFractionAlong="0.355668256135" weight="1." delay="0.05 ms"/>
            <connectionWD id="1" preCellId="../CG3D_L23PyrRS/6/L23PyrRS" preSegmentId="142" preFractionAlong="0.117526221159" postCellId="../CG3D_L23PyrRS/0/L23PyrRS" postSegmentId="51" postFractionAlong="0.554924601522" weight="1." delay="0.05 ms"/>
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        </projection>
        <projection id="Proj2syn0_CG3D_L23PyrRS_CG3D_SupAxAx" presynapticPopulation="CG3D_L23PyrRS" postsynapticPopulation="CG3D_SupAxAx" synapse="Syn_NMDA_RSPyr_SupFS">
            <connectionWD id="0" preCellId="../CG3D_L23PyrRS/6/L23PyrRS" preSegmentId="143" preFractionAlong="0.754339735948" postCellId="../CG3D_SupAxAx/0/SupAxAx" postSegmentId="44" postFractionAlong="0.726473598234" weight="2.5" delay="0.05 ms"/>
            <connectionWD id="1" preCellId="../CG3D_L23PyrRS/5/L23PyrRS" preSegmentId="147" preFractionAlong="0.575321848811" postCellId="../CG3D_SupAxAx/0/SupAxAx" postSegmentId="39" postFractionAlong="0.770598740321" weight="2.5" delay="0.05 ms"/>
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        </projection>
        <projection id="Proj2syn1_CG3D_L23PyrRS_CG3D_SupAxAx" presynapticPopulation="CG3D_L23PyrRS" postsynapticPopulation="CG3D_SupAxAx" synapse="Syn_AMPA_SupPyr_SupFS">
            <connectionWD id="0" preCellId="../CG3D_L23PyrRS/6/L23PyrRS" preSegmentId="143" preFractionAlong="0.754339735948" postCellId="../CG3D_SupAxAx/0/SupAxAx" postSegmentId="44" postFractionAlong="0.726473598234" weight="1." delay="0.05 ms"/>
            <connectionWD id="1" preCellId="../CG3D_L23PyrRS/5/L23PyrRS" preSegmentId="147" preFractionAlong="0.575321848811" postCellId="../CG3D_SupAxAx/0/SupAxAx" postSegmentId="39" postFractionAlong="0.770598740321" weight="1." delay="0.05 ms"/>
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        </projection>
        <projection id="Proj3syn0_CG3D_L23PyrRS_CG3D_SupLTS" presynapticPopulation="CG3D_L23PyrRS" postsynapticPopulation="CG3D_SupLTS" synapse="Syn_NMDA_RSPyr_SupLTS">
            <connectionWD id="0" preCellId="../CG3D_L23PyrRS/5/L23PyrRS" preSegmentId="147" preFractionAlong="0.518494965004" postCellId="../CG3D_SupLTS/0/SupLTSInter" postSegmentId="63" postFractionAlong="0.915143000544" weight="2.5" delay="0.05 ms"/>
            <connectionWD id="1" preCellId="../CG3D_L23PyrRS/2/L23PyrRS" preSegmentId="146" preFractionAlong="0.983355855427" postCellId="../CG3D_SupLTS/0/SupLTSInter" postSegmentId="15" postFractionAlong="0.23900730498" weight="2.5" delay="0.05 ms"/>
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        </projection>
        <projection id="Proj3syn1_CG3D_L23PyrRS_CG3D_SupLTS" presynapticPopulation="CG3D_L23PyrRS" postsynapticPopulation="CG3D_SupLTS" synapse="Syn_AMPA_SupPyr_SupLTS">
            <connectionWD id="0" preCellId="../CG3D_L23PyrRS/5/L23PyrRS" preSegmentId="147" preFractionAlong="0.518494965004" postCellId="../CG3D_SupLTS/0/SupLTSInter" postSegmentId="63" postFractionAlong="0.915143000544" weight="1." delay="0.05 ms"/>
            <connectionWD id="1" preCellId="../CG3D_L23PyrRS/2/L23PyrRS" preSegmentId="146" preFractionAlong="0.983355855427" postCellId="../CG3D_SupLTS/0/SupLTSInter" postSegmentId="15" postFractionAlong="0.23900730498" weight="1." delay="0.05 ms"/>
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        </projection>
        <projection id="Proj4syn0_CG3D_L23PyrRS_CG3D_SupBask" presynapticPopulation="CG3D_L23PyrRS" postsynapticPopulation="CG3D_SupBask" synapse="Syn_NMDA_RSPyr_SupFS">
            <connectionWD id="0" preCellId="../CG3D_L23PyrRS/2/L23PyrRS" preSegmentId="143" preFractionAlong="0.277674759438" postCellId="../CG3D_SupBask/0/SupBasket" postSegmentId="39" postFractionAlong="0.958732789487" weight="2.5" delay="0.05 ms"/>
            <connectionWD id="1" preCellId="../CG3D_L23PyrRS/9/L23PyrRS" preSegmentId="142" preFractionAlong="0.607303729824" postCellId="../CG3D_SupBask/0/SupBasket" postSegmentId="16" postFractionAlong="0.694281445285" weight="2.5" delay="0.05 ms"/>
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        </projection>
        <projection id="Proj4syn1_CG3D_L23PyrRS_CG3D_SupBask" presynapticPopulation="CG3D_L23PyrRS" postsynapticPopulation="CG3D_SupBask" synapse="Syn_AMPA_SupPyr_SupFS">
            <connectionWD id="0" preCellId="../CG3D_L23PyrRS/2/L23PyrRS" preSegmentId="143" preFractionAlong="0.277674759438" postCellId="../CG3D_SupBask/0/SupBasket" postSegmentId="39" postFractionAlong="0.958732789487" weight="1." delay="0.05 ms"/>
            <connectionWD id="1" preCellId="../CG3D_L23PyrRS/9/L23PyrRS" preSegmentId="142" preFractionAlong="0.607303729824" postCellId="../CG3D_SupBask/0/SupBasket" postSegmentId="16" postFractionAlong="0.694281445285" weight="1." delay="0.05 ms"/>
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        </projection>
        <projection id="Proj5syn0_CG3D_SupAxAx_CG3D_L23PyrRS" presynapticPopulation="CG3D_SupAxAx" postsynapticPopulation="CG3D_L23PyrRS" synapse="Syn_GABAA_SupAxAx_SupPyr">
            <connectionWD id="0" preCellId="../CG3D_SupAxAx/0/SupAxAx" preSegmentId="112" preFractionAlong="0.127502058251" postCellId="../CG3D_L23PyrRS/0/L23PyrRS" postSegmentId="136" postFractionAlong="0.0354720908452" weight="1." delay="0.05 ms"/>
            <connectionWD id="1" preCellId="../CG3D_SupAxAx/0/SupAxAx" preSegmentId="113" preFractionAlong="0.960914364642" postCellId="../CG3D_L23PyrRS/0/L23PyrRS" postSegmentId="137" postFractionAlong="0.395859291253" weight="1." delay="0.05 ms"/>
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        </projection>
        <projection id="Proj6syn0_CG3D_SupLTS_CG3D_L23PyrRS" presynapticPopulation="CG3D_SupLTS" postsynapticPopulation="CG3D_L23PyrRS" synapse="Syn_GABAA_SupLTS_SupPyr">
            <connectionWD id="0" preCellId="../CG3D_SupLTS/0/SupLTSInter" preSegmentId="113" preFractionAlong="0.279829784354" postCellId="../CG3D_L23PyrRS/0/L23PyrRS" postSegmentId="130" postFractionAlong="0.412951251471" weight="1." delay="0.05 ms"/>
            <connectionWD id="1" preCellId="../CG3D_SupLTS/0/SupLTSInter" preSegmentId="117" preFractionAlong="0.681002347781" postCellId="../CG3D_L23PyrRS/0/L23PyrRS" postSegmentId="97" postFractionAlong="0.761462206585" weight="1." delay="0.05 ms"/>
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        </projection>
        <projection id="Proj7syn0_CG3D_SupLTS_CG3D_SupAxAx" presynapticPopulation="CG3D_SupLTS" postsynapticPopulation="CG3D_SupAxAx" synapse="Syn_GABAA_SupLTS_FS">
            <connectionWD id="0" preCellId="../CG3D_SupLTS/0/SupLTSInter" preSegmentId="116" preFractionAlong="0.711487993957" postCellId="../CG3D_SupAxAx/0/SupAxAx" postSegmentId="74" postFractionAlong="0.257942174066" weight="1." delay="0.05 ms"/>
            <connectionWD id="1" preCellId="../CG3D_SupLTS/0/SupLTSInter" preSegmentId="117" preFractionAlong="0.441446812489" postCellId="../CG3D_SupAxAx/0/SupAxAx" postSegmentId="19" postFractionAlong="0.0790105587984" weight="1." delay="0.05 ms"/>
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        </projection>
        <projection id="Proj10syn0_CG3D_SupLTS_CG3D_SupBask" presynapticPopulation="CG3D_SupLTS" postsynapticPopulation="CG3D_SupBask" synapse="Syn_GABAA_SupLTS_FS">
            <connectionWD id="0" preCellId="../CG3D_SupLTS/0/SupLTSInter" preSegmentId="116" preFractionAlong="0.932842686869" postCellId="../CG3D_SupBask/0/SupBasket" postSegmentId="70" postFractionAlong="0.592418539027" weight="1." delay="0.05 ms"/>
            <connectionWD id="1" preCellId="../CG3D_SupLTS/0/SupLTSInter" preSegmentId="117" preFractionAlong="0.0613830943123" postCellId="../CG3D_SupBask/0/SupBasket" postSegmentId="36" postFractionAlong="0.0956109064717" weight="1." delay="0.05 ms"/>
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        </projection>
        <projection id="Proj11syn0_CG3D_SupBask_CG3D_L23PyrRS" presynapticPopulation="CG3D_SupBask" postsynapticPopulation="CG3D_L23PyrRS" synapse="Syn_GABAA_SupBask_SupPyr">
            <connectionWD id="0" preCellId="../CG3D_SupBask/0/SupBasket" preSegmentId="116" preFractionAlong="0.574261511676" postCellId="../CG3D_L23PyrRS/0/L23PyrRS" postSegmentId="12" postFractionAlong="0.898141596244" weight="1." delay="0.05 ms"/>
            <connectionWD id="1" preCellId="../CG3D_SupBask/0/SupBasket" preSegmentId="113" preFractionAlong="0.250687022603" postCellId="../CG3D_L23PyrRS/0/L23PyrRS" postSegmentId="77" postFractionAlong="0.422415502235" weight="1." delay="0.05 ms"/>
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        </projection>
        <projection id="Proj12syn0_CG3D_SupBask_CG3D_SupAxAx" presynapticPopulation="CG3D_SupBask" postsynapticPopulation="CG3D_SupAxAx" synapse="Syn_GABAA_SupBask_SupAxAx">
            <connectionWD id="0" preCellId="../CG3D_SupBask/0/SupBasket" preSegmentId="117" preFractionAlong="0.702178901472" postCellId="../CG3D_SupAxAx/0/SupAxAx" postSegmentId="9" postFractionAlong="0.810433482753" weight="1." delay="0.05 ms"/>
            <connectionWD id="1" preCellId="../CG3D_SupBask/0/SupBasket" preSegmentId="113" preFractionAlong="0.676043799834" postCellId="../CG3D_SupAxAx/0/SupAxAx" postSegmentId="88" postFractionAlong="0.898443888026" weight="1." delay="0.05 ms"/>
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        </projection>
        <projection id="Proj13syn0_CG3D_SupBask_CG3D_SupLTS" presynapticPopulation="CG3D_SupBask" postsynapticPopulation="CG3D_SupLTS" synapse="Syn_GABAA_SupBask_SupLTS">
            <connectionWD id="0" preCellId="../CG3D_SupBask/0/SupBasket" preSegmentId="112" preFractionAlong="0.822968351398" postCellId="../CG3D_SupLTS/0/SupLTSInter" postSegmentId="16" postFractionAlong="0.0263421600557" weight="1." delay="0.05 ms"/>
            <connectionWD id="1" preCellId="../CG3D_SupBask/0/SupBasket" preSegmentId="112" preFractionAlong="0.992796592554" postCellId="../CG3D_SupLTS/0/SupLTSInter" postSegmentId="71" postFractionAlong="0.0988648440461" weight="1." delay="0.05 ms"/>
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        </projection>
        <inputList id="DepCurr_L23RS_TO_CG3D_L23PyrRS_0_0" population="CG3D_L23PyrRS" component="DepCurr_L23RS_TO_CG3D_L23PyrRS_Pulse0_Cell7">
            <input id="0" target="../CG3D_L23PyrRS/7/L23PyrRS" destination="synapses" segmentId="0" fractionAlong="0.500000"/>
        </inputList>
        <inputList id="DepCurr_L23RS_TO_CG3D_L23PyrRS_1_0" population="CG3D_L23PyrRS" component="DepCurr_L23RS_TO_CG3D_L23PyrRS_Pulse0_Cell2">
            <input id="0" target="../CG3D_L23PyrRS/2/L23PyrRS" destination="synapses" segmentId="0" fractionAlong="0.500000"/>
        </inputList>
        <inputList id="DepCurr_L23RS_TO_CG3D_L23PyrRS_2_0" population="CG3D_L23PyrRS" component="DepCurr_L23RS_TO_CG3D_L23PyrRS_Pulse0_Cell1">
            <input id="0" target="../CG3D_L23PyrRS/1/L23PyrRS" destination="synapses" segmentId="0" fractionAlong="0.500000"/>
        </inputList>
        <inputList id="DepCurr_L23RS_TO_CG3D_L23PyrRS_3_0" population="CG3D_L23PyrRS" component="DepCurr_L23RS_TO_CG3D_L23PyrRS_Pulse0_Cell4">
            <input id="0" target="../CG3D_L23PyrRS/4/L23PyrRS" destination="synapses" segmentId="0" fractionAlong="0.500000"/>
        </inputList>
        <inputList id="DepCurr_L23RS_TO_CG3D_L23PyrRS_4_0" population="CG3D_L23PyrRS" component="DepCurr_L23RS_TO_CG3D_L23PyrRS_Pulse0_Cell6">
            <input id="0" target="../CG3D_L23PyrRS/6/L23PyrRS" destination="synapses" segmentId="0" fractionAlong="0.500000"/>
        </inputList>
        <inputList id="DepCurr_L23RS_TO_CG3D_L23PyrRS_5_0" population="CG3D_L23PyrRS" component="DepCurr_L23RS_TO_CG3D_L23PyrRS_Pulse0_Cell5">
            <input id="0" target="../CG3D_L23PyrRS/5/L23PyrRS" destination="synapses" segmentId="0" fractionAlong="0.500000"/>
        </inputList>
        <inputList id="DepCurr_L23RS_TO_CG3D_L23PyrRS_6_0" population="CG3D_L23PyrRS" component="DepCurr_L23RS_TO_CG3D_L23PyrRS_Pulse0_Cell3">
            <input id="0" target="../CG3D_L23PyrRS/3/L23PyrRS" destination="synapses" segmentId="0" fractionAlong="0.500000"/>
        </inputList>
        <inputList id="DepCurr_L23RS_TO_CG3D_L23PyrRS_7_0" population="CG3D_L23PyrRS" component="DepCurr_L23RS_TO_CG3D_L23PyrRS_Pulse0_Cell0">
            <input id="0" target="../CG3D_L23PyrRS/0/L23PyrRS" destination="synapses" segmentId="0" fractionAlong="0.500000"/>
        </inputList>
        <inputList id="DepCurr_L23RS_TO_CG3D_L23PyrRS_8_0" population="CG3D_L23PyrRS" component="DepCurr_L23RS_TO_CG3D_L23PyrRS_Pulse0_Cell8">
            <input id="0" target="../CG3D_L23PyrRS/8/L23PyrRS" destination="synapses" segmentId="0" fractionAlong="0.500000"/>
        </inputList>
        <inputList id="DepCurr_L23RS_TO_CG3D_L23PyrRS_9_0" population="CG3D_L23PyrRS" component="DepCurr_L23RS_TO_CG3D_L23PyrRS_Pulse0_Cell9">
            <input id="0" target="../CG3D_L23PyrRS/9/L23PyrRS" destination="synapses" segmentId="0" fractionAlong="0.500000"/>
        </inputList>
        <inputList id="BackgroundL23RS_TO_CG3D_L23PyrRS_0_0" population="CG3D_L23PyrRS" component="BackgroundL23RS_TO_CG3D_L23PyrRS_PoiSyn0">
            <input id="0" target="../CG3D_L23PyrRS/0/L23PyrRS" destination="synapses" segmentId="58" fractionAlong="0.078715"/>
            <input id="1" target="../CG3D_L23PyrRS/0/L23PyrRS" destination="synapses" segmentId="56" fractionAlong="0.055169"/>
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        </inputList>
        <inputList id="EctopicStimL23RS_TO_CG3D_L23PyrRS_0_0" population="CG3D_L23PyrRS" component="EctopicStimL23RS_TO_CG3D_L23PyrRS_PoiSyn0">
            <input id="0" target="../CG3D_L23PyrRS/0/L23PyrRS" destination="synapses" segmentId="143" fractionAlong="0.500000"/>
            <input id="1" target="../CG3D_L23PyrRS/9/L23PyrRS" destination="synapses" segmentId="143" fractionAlong="0.500000"/>
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        </inputList>
    </network>
</neuroml>
